# Дискретное преобразование Фурье
# DFT
# Амплитуды сигналов:
A1 := 2
A2 := 4
A3 := 0.8
# Периоды сигналов:
T1 := 0.0005
T2 := 0.0002
T3 := 0.000125
# Время:
t := 0, 0.0001 .. 1
# Частоты сигналов:
f1 := 1/T1 = 2000
f2 := 1/T2 = 5000
f3 := 1/T3 = 8000
# Угловые частоты сигналов:
ω1 := 2*π*f1
ω2 := 2*π*f2
ω3 := 2*π*f3
# Функции синусоидальных составляющих сигнала:
s1(t) := A1*sin(ω1*t)
s2(t) := A2*sin(ω2*t)
s3(t) := A3*sin(ω3*t)
# Результирующий сигнал:
s(t) := s1(t) + s2(t) + s3(t)
# График результирующего сигнала:
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# Частота дискретизации:
fs := 20000
# Интервал выборок:
Δt := 1/fs = 5e-5
# Количество частотных отсчетов результата ДПФ:
N := 20
# Индекс ДПФ в частотной области:
m := 0, 1 .. N - 1
# Частоты анализа:
fg(m) := (m*fs)/N
# Временной индекс входных отсчетов:
n := 0, 1 .. N - 1
# Функции синусоидальных составляющих в дискретной форме:
x1(n) := A1*sin(ω1*n*Δt)
x2(n) := A2*sin(ω2*n*Δt)
x3(n) := A3*sin(ω3*n*Δt)
# Результирующий дискретный сигнал:
x(n) := x1(n) + x2(n) + x3(n)
# График дискретного сигнала:
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# Компонент ДПФ:
X(m) := sum(x(n)*cos(2*π*n*m/N) - 1i*(x(n)*sin(2*π*n*m/N)), n = 0 .. N - 1)
# Амплитуда компонента ДПФ:
Xmag(m) := |X(m)|
# График амплитудного спектра сигнала:
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fg(m) = [0; 1000; 2000; 3000; 4000; 5000; 6000; 7000; 8000; 9000; 10000; 11000; 12000; 13000; 14000; 15000; 16000; 17000; 18000; 19000]
# Назад:
# [reference: index.xmcd]
