# FFT
N := 40
k := 0 .. N - 1
T := 0.5
n[k] := T*k
fs := 1/T
freq[k] := k*fs/N
ω[0] := π/4
ω[1] := π/6
f(t) := sin(ω[0]*t) + sin(ω[1]*t)
f0 := 2*π/ω[0] = 8
f1 := 2*π/ω[1] = 12
x[k] := f(n[k])
X := CFFT(x)
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# Назад
# [reference: index.xmcd]
