# Скользящее усреднение
# (Simple Moving Average)
# Исходные данные:
I := 200  # Интервал времени
t := 0, 0.01 .. I  # Дискреты времени
T := 10*π  # Период сигнала
A := 4  # Амплитуда сигнала
ω := 2*π/T = 0.2  # Угловая частота сигнала
g(t) := A*sin(ω*t)  # Функция синусоидальной волны
level := A + 8  # Амплитуда помехи
x(t) := A - rnd(level)  # Функция помехи
s(t) := g(t) + x(t)  # Функция сумм волны и помехи
# Дельта функция δ(t):
δ(t) :=
    1 if t == 0
    0 otherwise
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Δt := 0.2  # Интервал выборок
m := I/Δt = 1000  # Число дискретных точек
ν(t) := sum(s(t)*δ(t - n*Δt), n = 0 .. m)  # Функция дискретизации
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# График аналогового сигнала:
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# График дискретизированного сигнала:
# Назад:
# [reference: index.xmcd]
