# Дискретизация сигнала
# Исходные данные:
t := 0, 0.01 .. 200  # Временной интервал
T := 10*π  # Период сигнала
A := 4  # Амплитуда сигнала
ω := 2*π/T = 0.2  # Угловая частота сигнала
x(t) := A*sin(ω*t)  # Функция синусоидальной волны
# Дельта функция δ(t):
δ(t) :=
    1 if t == 0
    0 otherwise
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Δt := 2  # Интервал выборок
m := 200  # Число дискретных точек
ν(t) := sum(x(t)*δ(t - n*Δt), n = 0 .. m)  # Функция дискретного сигнала
# График аналогового сигнала:
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# График дискретизированного сигнала:
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# Назад:
# [reference: index.xmcd]
