# Представление сигнала рядом Фурье
t := 0, 0.01 .. 100
a0 := 1
a1 := 0.4
a2 := 0.1
a3 := 0.3
b1 := 0.5
b2 := 0.7
b3 := 0.3
f(t) := a0/2 + a1*cos(t) + b1*sin(t) + a2*cos(2*t) + b2*sin(2*t) + (a3*cos(3*t) + b3*sin(3*t))
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# Назад
# [reference: index.xmcd]
