# signals
n := -10 .. 20
u(n) :=
    1 if n ≥ 0
    0 if n < 0
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δ(n) :=
    1 if n == 0
    0 otherwise
k := 3
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ω[0] := 0.6
x(n) := sin(ω[0]*n)
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α := 0.95
y(n) := α^n
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β := 1.05
z(n) := β^n
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# Назад
# [reference: index.xmcd]
