# Синусоидальный сигнал с помехой
# Исходные данные:
t := 1, 2 .. 1500
-Дискреты*времени
A := 3
-Амплитуда
T := 200
-Период
θ := 0
-Начальная*фаза
# Частота:
f := 1/T = 0.005
# Угловая частота:
ω := 2*π*f
# Амплитуда помехи:
level := A + 2
# Функция синусоидальной волны:
g(t) := A*sin(ω*t + θ)
# Функция помехи:
x(t) := A - rnd(level)
# Функция сумм волны и помехи:
y(t) := g(t) + x(t)
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# Назад:
# [reference: index.xmcd]
