# Отсчеты для представления синусоидального сигнала ШИМ
N := 256  # Количество точек на период
i := 0, 1 .. N - 1  # Дискреты
m := 8  # Разрядность ШИМ
x(i) := (2^m/2 - 1)*(sin(2*π*i/N) + 1)
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y(i) := ceil(x(i))
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y(i) = [
    127; 131; 134; 137; 140; 143; 146; 149; 152; 155
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]
# Назад:
# [reference: index.xmcd]
