# Синусоидальная волна
# Исходные данные:
A := 2
-Амплитуда
θ := 0
-Начальная*фаза
T := 500
-Период
t := 1, 2 .. 1500
-Время
# Частота:
f := 1/T = 0.002
# Угловая частота:
ω := 2*π*f
# Функция синусоидальной волны:
g(t) := A*sin(ω*t + θ)
# График:
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# Назад :
# [reference: index.xmcd]
# [reference: index.xmcd]
# Назад:
